# OpenSim document version 40000
XsensDataReaderSettings:
  trial_prefix: MT_01200627-Y006-000
  ExperimentalSensors:
    ExperimentalSensor _00B4A677: name_in_model=torso_imu
    ExperimentalSensor _00B4A679: name_in_model=pelvis_imu
    ExperimentalSensor _00B4A678: name_in_model=humerus_r_imu
    ExperimentalSensor _00B4258E: name_in_model=radius_r_imu
    ExperimentalSensor _00B4A66A: name_in_model=radius_l_imu
    ExperimentalSensor _00B4A66F: name_in_model=humerus_l_imu
    ExperimentalSensor _00B4A675: name_in_model=hand_r_imu
    ExperimentalSensor _00B4A670: name_in_model=hand_l_imu
